// SBML level 2 version 4

model Model2C()
  // SBML model exported from PottersWheel on 2021-06-03 09:49:43.
  // % PottersWheel model definition file
  // function m = Model2C()
  // m = pwGetEmptyModel();
  // %% Meta information
  // m.name = 'Model2C';
  // m.description = 'Protein aggregation';
  // m.authors = {};
  // m.dates = {'2021-06-01'};
  // m.modelFormat = 3;
  // %% Default sampling time points
  // m.t = 0:10:200;
  // %% X - Dynamic variables
  // % m = pwAddX(m, *ID, *startValue, fitSetting, minValue, maxValue, unit, compartment, name, description, typeOfStartValue, designerProps, classname)
  // m = pwAddX(m, 'M2' , 0.1, 'fix', 0, [], [], 'C1', [] , [] , [] , [-415 -375 0 100 40 0.870588235294118 0.490196078431373 0 0 0 0 1] , 'protein.generic');
  // m = pwAddX(m, 'M3' , 0, 'fix', 0, [], [], 'C1', [] , [] , [] , [-345 -865 0 100 40 0.870588235294118 0.490196078431373 0 0 0 0 1] , 'protein.generic');
  // m = pwAddX(m, 'M4' , 0, 'fix', 0, [], [], 'C1', [] , [] , [] , [-115 -815 0 100 40 0.870588235294118 0.490196078431373 0 0 0 0 1] , 'protein.generic');
  // m = pwAddX(m, 'AC' , 0, 'fix', 0, [], [], 'C1', [] , [] , [] , [-145 -1075 0 100 40 0.870588235294118 0.490196078431373 0 0 0 0 1] , 'protein.generic');
  // m = pwAddX(m, 'I1' , 0, 'fix', 0, [], [], 'C1', [] , [] , [] , [165 -1095 0 100 40 0 0.498039215686275 0 0 0 0 1] , 'protein.generic');
  // m = pwAddX(m, 'I2' , 0, 'fix', 0, [], [], 'C1', [] , [] , [] , [585 -1035 0 100 40 0 0.498039215686275 0 0 0 0 1] , 'protein.generic');
  // m = pwAddX(m, 'I3' , 0, 'fix', 0, [], [], 'C1', [] , [] , [] , [805 -695 0 100 40 0 0.498039215686275 0 0 0 0 1] , 'protein.generic');
  // m = pwAddX(m, 'B1' , 0, 'fix', 0, [], [], 'C1', [] , [] , [] , [1085 -175 0 100 40 0.301960784313725 0.745098039215686 0.933333333333333 0 0 0 1] , 'protein.generic');
  // m = pwAddX(m, 'B2' , 0, 'fix', 0, [], [], 'C1', [] , [] , [] , [1155 225 0 100 40 0.301960784313725 0.745098039215686 0.933333333333333 0 0 0 1] , 'protein.generic');
  // m = pwAddX(m, 'B3' , 0, 'fix', 0, [], [], 'C1', [] , [] , [] , [1035 805 0 100 40 0.301960784313725 0.745098039215686 0.933333333333333 0 0 0 1] , 'protein.generic');
  // m = pwAddX(m, 'I1_ThT' , 0, 'fix', 0, [], [], 'C1', [] , [] , [] , [675 905 0 100 40 1 0 1 0 0 0 1] , 'protein.generic');
  // m = pwAddX(m, 'I2_ThT' , 0, 'fix', 0, [], [], 'C1', [] , [] , [] , [505 945 0 100 40 1 0 1 0 0 0 1] , 'protein.generic');
  // m = pwAddX(m, 'I3_ThT' , 0, 'fix', 0, [], [], 'C1', [] , [] , [] , [325 915 0 100 40 1 0 1 0 0 0 1] , 'protein.generic');
  // m = pwAddX(m, 'B1_ThT' , 0, 'fix', 0, [], [], 'C1', [] , [] , [] , [-35 805 0 100 40 1 0 1 0 0 0 1] , 'protein.generic');
  // m = pwAddX(m, 'B2_ThT' , 0, 'fix', 0, [], [], 'C1', [] , [] , [] , [-315 635 0 100 40 1 0 1 0 0 0 1] , 'protein.generic');
  // m = pwAddX(m, 'B3_ThT' , 0, 'fix', 0, [], [], 'C1', [] , [] , [] , [1085 1045 0 100 40 1 0 1 0 0 0 1] , 'protein.generic');
  // m = pwAddX(m, 'Pt' , 300, 'fix', [], [], [], 'C1', [] , [] , [] , [5 95 0 100 40 1 0 0 0 0 0 1] , 'protein.generic');
  // m = pwAddX(m, 'SumThT' , 1000, 'fix', [], [], [], 'C1', [] , [] , [] , [-55 -75 0 100 40 1 0 0 0 0 0 1] , 'protein.generic');
  // m = pwAddX(m, 'I1a_ThT', 0, 'fix', 0, [], [], 'c1', [] , [] , [] , [165 -1615 0 100 40 1 0 1 0 0 0 1] , 'protein.generic');
  // m = pwAddX(m, 'I1b_ThT', 0, 'fix', 0, [], [], 'c1', [] , [] , [] , [405 -1655 0 100 40 1 0 1 0 0 0 1] , 'protein.generic');
  // m = pwAddX(m, 'I1c_ThT', 0, 'fix', 0, [], [], 'c1', [] , [] , [] , [655 -1585 0 100 40 1 0 1 0 0 0 1] , 'protein.generic');
  // m = pwAddX(m, 'I2a' , 0, 'fix', 0, [], [], 'c1', [] , [] , [] , [825 -1275 0 100 40 0 0.498039215686275 0 0 0 0 1] , 'protein.generic');
  // m = pwAddX(m, 'I2b' , 0, 'fix', 0, [], [], 'c1', [] , [] , [] , [945 -1075 0 100 40 0 0.498039215686275 0 0 0 0 1] , 'protein.generic');
  // m = pwAddX(m, 'I2c' , 0, 'fix', 0, [], [], 'c1', [] , [] , [] , [975 -855 0 100 40 0 0.498039215686275 0 0 0 0 1] , 'protein.generic');
  // m = pwAddX(m, 'I2a_ThT', 0, 'fix', 0, [], [], 'c1', [] , [] , [] , [1045 -1385 0 100 40 1 0 1 0 0 0 1] , 'protein.generic');
  // m = pwAddX(m, 'I2b_ThT', 0, 'fix', 0, [], [], 'c1', [] , [] , [] , [1175 -1265 0 100 40 1 0 1 0 0 0 1] , 'protein.generic');
  // m = pwAddX(m, 'I2c_ThT', 0, 'fix', 0, [], [], 'c1', [] , [] , [] , [1265 -1075 0 100 40 1 0 1 0 0 0 1] , 'protein.generic');
  // m = pwAddX(m, 'B1a' , 0, 'fix', 0, [], [], 'c1', [] , [] , [] , [1765 -415 0 100 40 0.301960784313725 0.745098039215686 0.933333333333333 0 0 0 1] , 'protein.generic');
  // m = pwAddX(m, 'B1b' , 0, 'fix', 0, [], [], 'c1', [] , [] , [] , [1785 -165 0 100 40 0.301960784313725 0.745098039215686 0.933333333333333 0 0 0 1] , 'protein.generic');
  // m = pwAddX(m, 'B1c' , 0, 'fix', 0, [], [], 'c1', [] , [] , [] , [1755 115 0 100 40 0.301960784313725 0.745098039215686 0.933333333333333 0 0 0 1] , 'protein.generic');
  // m = pwAddX(m, 'B1a_ThT', 0, 'fix', 0, [], [], 'c1', [] , [] , [] , [1955 -545 0 100 40 1 0 1 0 0 0 1] , 'protein.generic');
  // m = pwAddX(m, 'B1b_ThT', 0, 'fix', 0, [], [], 'c1', [] , [] , [] , [2095 -245 0 100 40 1 0 1 0 0 0 1] , 'protein.generic');
  // m = pwAddX(m, 'B1c_ThT', 0, 'fix', 0, [], [], 'c1', [] , [] , [] , [2115 135 0 100 40 1 0 1 0 0 0 1] , 'protein.generic');
  // m = pwAddX(m, 'B2a' , 0, 'fix', 0, [], [], 'c1', [] , [] , [] , [1515 265 0 100 40 0.301960784313725 0.745098039215686 0.933333333333333 0 0 0 1] , 'protein.generic');
  // m = pwAddX(m, 'B2b' , 0, 'fix', 0, [], [], 'c1', [] , [] , [] , [1585 485 0 100 40 0.301960784313725 0.745098039215686 0.933333333333333 0 0 0 1] , 'protein.generic');
  // m = pwAddX(m, 'B2c' , 0, 'fix', 0, [], [], 'c1', [] , [] , [] , [1365 725 0 100 40 0.301960784313725 0.745098039215686 0.933333333333333 0 0 0 1] , 'protein.generic');
  // m = pwAddX(m, 'B2a_ThT', 0, 'fix', 0, [], [], 'c1', [] , [] , [] , [1855 385 0 100 40 1 0 1 0 0 0 1] , 'protein.generic');
  // m = pwAddX(m, 'B2b_ThT', 0, 'fix', 0, [], [], 'c1', [] , [] , [] , [1835 635 0 100 40 1 0 1 0 0 0 1] , 'protein.generic');
  // m = pwAddX(m, 'B2c_ThT', 0, 'fix', 0, [], [], 'c1', [] , [] , [] , [1715 905 0 100 40 1 0 1 0 0 0 1] , 'protein.generic');
  // m = pwAddX(m, 'I1a' , 0, 'fix', 0, [], [], 'c1', [] , [] , [] , [165 -1375 0 100 40 0 0.498039215686275 0 0 0 0 1] , 'protein.generic');
  // m = pwAddX(m, 'I1b' , 0, 'fix', 0, [], [], 'c1', [] , [] , [] , [385 -1455 0 100 40 0 0.498039215686275 0 0 0 0 1] , 'protein.generic');
  // m = pwAddX(m, 'I1c' , 0, 'fix', 0, [], [], 'c1', [] , [] , [] , [615 -1315 0 100 40 0 0.498039215686275 0 0 0 0 1] , 'protein.generic');
  // m = pwAddX(m, 'M5' , 0, 'fix', 0, [], [], 'c1', [] , [] , [] , [] , 'protein.generic');
  // m = pwAddX(m, 'I1d' , 0, 'fix', 0, [], [], 'c1', [] , [] , [] , [] , 'protein.generic');
  // m = pwAddX(m, 'I2d' , 0, 'fix', 0, [], [], 'c1', [] , [] , [] , [] , 'protein.generic');
  // m = pwAddX(m, 'I1d_ThT', 0, 'fix', 0, [], [], 'c1', [] , [] , [] , [] , 'protein.generic');
  // m = pwAddX(m, 'I2d_ThT', 0, 'fix', 0, [], [], 'c1', [] , [] , [] , [] , 'protein.generic');
  // m = pwAddX(m, 'B1d' , 0, 'fix', 0, [], [], 'c1', [] , [] , [] , [] , 'protein.generic');
  // m = pwAddX(m, 'B1d_ThT', 0, 'fix', 0, [], [], 'c1', [] , [] , [] , [] , 'protein.generic');
  // m = pwAddX(m, 'B2d' , 0, 'fix', 0, [], [], 'c1', [] , [] , [] , [] , 'protein.generic');
  // m = pwAddX(m, 'B2d_ThT', 0, 'fix', 0, [], [], 'c1', [] , [] , [] , [] , 'protein.generic');
  // %% K - Dynamic parameters
  // % m = pwAddK(m, *ID, *value, fitSetting, minValue, maxValue, unit, name, description)
  // m = pwAddK(m, 'Kx' , 0.1, 'global', 0.0001, 10000);
  // m = pwAddK(m, 'Ky' , 0.1, 'global', 0.0001, 10000);
  // m = pwAddK(m, 'Kac', 0.1, 'global', 0.0001, 10000);
  // m = pwAddK(m, 'Km' , 0.1, 'global', 0.0001, 10000);
  // m = pwAddK(m, 'Kmi', 0.1, 'global', 0.0001, 10000);
  // m = pwAddK(m, 'Ks' , 0.1, 'global', 0.0001, 10000);
  // m = pwAddK(m, 'Kt' , 0.1, 'global', 0.0001, 10000);
  // m = pwAddK(m, 'Ki' , 0.1, 'global', 0.0001, 10000);
  // m = pwAddK(m, 'Kj' , 0.1, 'global', 0.0001, 10000);
  // m = pwAddK(m, 'Ke' , 0.1, 'global', 0.0001, 10000);
  // m = pwAddK(m, 'Kf' , 0.1, 'global', 0.0001, 10000);
  // m = pwAddK(m, 'Kc' , 0.1, 'global', 0.0001, 10000);
  // m = pwAddK(m, 'Kd' , 0.1, 'global', 0.0001, 10000);
  // m = pwAddK(m, 'Ka' , 0.1, 'global', 0.0001, 10000);
  // m = pwAddK(m, 'Kb' , 0.1, 'global', 0.0001, 10000);
  // m = pwAddK(m, 'Kp' , 0.1, 'global', 0.0001, 10000);
  // m = pwAddK(m, 'Kq' , 0.1, 'global', 0.0001, 10000);
  // m = pwAddK(m, 'Ki1', 0.1, 'global', 0.0001, 10000);
  // m = pwAddK(m, 'Kj1', 0.1, 'global', 0.0001, 10000);
  // m = pwAddK(m, 'Kc1', 0.1, 'global', 0.0001, 10000);
  // m = pwAddK(m, 'Kd1', 0.1, 'global', 0.0001, 10000);
  // %% R - Reactions
  // % m = pwAddR(m, *ID, *reactants, *products, *modifiers, *type, *options, *rateSignature, *parameters, description, name, fast, compartments, parameterTrunks, designerPropsR, stoichiometry, reversible)
  // m = pwAddR(m, 'R01' , { }, {'M2' }, {'X' }, 'C' , [] , 'k1 * m1 * m1', {'Kx'}, [], [], [], {}, {}, {[], [], [1 0 0 0 1.8 1 1 1], [1 0.9 0.1 0.1 1.8 1 4 1]});
  // m = pwAddR(m, 'R02' , {'M2' }, { }, { }, 'C' , [] , 'k1 * r1' , {'Ky'}, [], [], [], {}, {}, {[], [1 0.45 0.45 0.45 1.8 1 1 1], [], []});
  // m = pwAddR(m, 'R03' , {'M2' }, {'M3' }, {'X' }, 'C' , [] , 'k1 * r1 * m1', {'Kx'}, [], [], [], {}, {}, {[], [1 0.45 0.45 0.45 1.8 1 1 1], [1 0 0 0 1.8 1 1 1], [1 0.9 0.1 0.1 1.8 1 4 1]});
  // m = pwAddR(m, 'R04' , {'M3' }, {'M2' }, { }, 'C' , [] , 'k1 * r1' , {'Ky'}, [], [], [], {}, {}, {[], [1 0.45 0.45 0.45 1.8 1 1 1], [1 0 0 0 1.8 1 1 1], []});
  // m = pwAddR(m, 'R05' , {'M3' }, {'M4' }, {'X' }, 'C' , [] , 'k1 * r1 * m1', {'Kx'}, [], [], [], {}, {}, {[], [1 0.45 0.45 0.45 1.8 1 1 1], [1 0 0 0 1.8 1 1 1], [1 0.9 0.1 0.1 1.8 1 4 1]});
  // m = pwAddR(m, 'R06' , {'M4' }, {'M3' }, { }, 'C' , [] , 'k1 * r1' , {'Ky'}, [], [], [], {}, {}, {[], [1 0.45 0.45 0.45 1.8 1 1 1], [1 0 0 0 1.8 1 1 1], []});
  // m = pwAddR(m, 'R08' , {'AC' }, {'M5' }, { }, 'A' , [] , [] , {'Kmi'}, [], [], [], {}, {}, {[], [1 0.45 0.45 0.45 1.8 1 1 1], [1 0 0 0 1.8 1 1 1], []});
  // m = pwAddR(m, 'R09' , {'M5' }, {'AC' }, {'I3'}, 'A' , [] , [] , {'Kac'}, [], [], [], {}, {}, {[], [1 0.45 0.45 0.45 1.8 1 1 1], [1 0 0 0 1.8 1 1 1], [1 0.9 0.1 0.1 1.8 1 4 1]});
  // m = pwAddR(m, 'R07' , {'M5' }, {'AC' }, { }, 'A' , [] , [] , {'Km'}, [], [], [], {}, {}, {[], [1 0.45 0.45 0.45 1.8 1 1 1], [1 0 0 0 1.8 1 1 1], []});
  // m = pwAddR(m, 'R10' , {'AC' }, {'I1' }, { }, 'A' , [] , [] , {'Ks'}, [], [], [], {}, {}, {[], [1 0.45 0.45 0.45 1.8 1 1 1], [1 0 0 0 1.8 1 1 1], []});
  // m = pwAddR(m, 'R11' , {'I1' }, {'AC' }, { }, 'A' , [] , [] , {'Kt'}, [], [], [], {}, {}, {[], [1 0.45 0.45 0.45 1.8 1 1 1], [1 0 0 0 1.8 1 1 1], []});
  // m = pwAddR(m, 'R12' , {'I1','I1'}, {'I2' }, { }, 'A' , [] , [] , {'Ki'}, [], [], [], {}, {}, {[], [1 0.45 0.45 0.45 1.8 1 1 1;1 0.45 0.45 0.45 1.8 1 1 1], [1 0 0 0 1.8 1 1 1], []});
  // m = pwAddR(m, 'R13' , {'I2' }, {'I1','I1'}, { }, 'A' , [] , [] , {'Kj'}, [], [], [], {}, {}, {[], [1 0.45 0.45 0.45 1.8 1 1 1], [1 0 0 0 1.8 1 1 1;1 0 0 0 1.8 1 1 1], []});
  // m = pwAddR(m, 'R14' , {'I1' }, {'I1a' }, {'X' }, 'C' , [] , 'k1*r1*m1' , {'Ki1'}, [], [], [], {}, {}, {[], [1 0.45 0.45 0.45 1.8 1 1 1], [1 0 0 0 1.8 1 1 1], [1 0.9 0.1 0.1 1.8 1 4 1]});
  // m = pwAddR(m, 'R15' , {'I1a' }, {'I1' }, { }, 'C' , [] , 'k1*r1' , {'Kj1'}, [], [], [], {}, {}, {[], [1 0.45 0.45 0.45 1.8 1 1 1], [1 0 0 0 1.8 1 1 1], []});
  // m = pwAddR(m, 'R16' , {'I1a' }, {'I1b' }, {'X' }, 'C' , [] , 'k1*r1*m1' , {'Ki1'}, [], [], [], {}, {}, {[], [1 0.45 0.45 0.45 1.8 1 1 1], [1 0 0 0 1.8 1 1 1], [1 0.9 0.1 0.1 1.8 1 4 1]});
  // m = pwAddR(m, 'R17' , {'I1b' }, {'I1a' }, { }, 'C' , [] , 'k1*r1' , {'Kj1'}, [], [], [], {}, {}, {[], [1 0.45 0.45 0.45 1.8 1 1 1], [1 0 0 0 1.8 1 1 1], []});
  // m = pwAddR(m, 'R18' , {'I1b' }, {'I1c' }, {'X' }, 'C' , [] , 'k1*r1*m1' , {'Ki1'}, [], [], [], {}, {}, {[], [1 0.45 0.45 0.45 1.8 1 1 1], [1 0 0 0 1.8 1 1 1], [1 0.9 0.1 0.1 1.8 1 4 1]});
  // m = pwAddR(m, 'R19' , {'I1c' }, {'I1b' }, { }, 'C' , [] , 'k1*r1' , {'Kj1'}, [], [], [], {}, {}, {[], [1 0.45 0.45 0.45 1.8 1 1 1], [1 0 0 0 1.8 1 1 1], []});
  // m = pwAddR(m, 'R20' , {'I1c' }, {'I1d' }, {'X' }, 'C' , [] , 'k1*r1*m1' , {'Ki1'}, [], [], [], {}, {}, {[], [1 0.45 0.45 0.45 1.8 1 1 1], [1 0 0 0 1.8 1 1 1], [1 0.9 0.1 0.1 1.8 1 4 1]});
  // m = pwAddR(m, 'R21' , {'I1d' }, {'I1c' }, { }, 'C' , [] , 'k1*r1' , {'Kj1'}, [], [], [], {}, {}, {[], [1 0.45 0.45 0.45 1.8 1 1 1], [1 0 0 0 1.8 1 1 1], []});
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
  // Compartments:
  compartment c1 = 1;

  // Species:
  species M2 in C1 = 0.1;
  species M3 in C1 = 0;
  species M4 in C1 = 0;
  species AC in C1 = 0;
  species I1 in C1 = 0;
  species I2 in C1 = 0;
  species I3 in C1 = 0;
  species B1 in C1 = 0;
  species B2 in C1 = 0;
  species B3 in C1 = 0;
  species I1_ThT in C1 = 0;
  species I2_ThT in C1 = 0;
  species I3_ThT in C1 = 0;
  species B1_ThT in C1 = 0;
  species B2_ThT in C1 = 0;
  species B3_ThT in C1 = 0;
  species Pt in C1 = 300;
  species SumThT in C1 = 1000;
  species I1a_ThT in c1 = 0;
  species I1b_ThT in c1 = 0;
  species I1c_ThT in c1 = 0;
  species I2a in c1 = 0;
  species I2b in c1 = 0;
  species I2c in c1 = 0;
  species I2a_ThT in c1 = 0;
  species I2b_ThT in c1 = 0;
  species I2c_ThT in c1 = 0;
  species B1a in c1 = 0;
  species B1b in c1 = 0;
  species B1c in c1 = 0;
  species B1a_ThT in c1 = 0;
  species B1b_ThT in c1 = 0;
  species B1c_ThT in c1 = 0;
  species B2a in c1 = 0;
  species B2b in c1 = 0;
  species B2c in c1 = 0;
  species B2a_ThT in c1 = 0;
  species B2b_ThT in c1 = 0;
  species B2c_ThT in c1 = 0;
  species I1a in c1 = 0;
  species I1b in c1 = 0;
  species I1c in c1 = 0;
  species M5 in c1 = 0;
  species I1d in c1 = 0;
  species I2d in c1 = 0;
  species I1d_ThT in c1 = 0;
  species I2d_ThT in c1 = 0;
  species B1d in c1 = 0;
  species B1d_ThT in c1 = 0;
  species B2d in c1 = 0;
  species B2d_ThT in c1 = 0;
  species BoundedThT in c1;
  species Helix in c1;

  // Parameters:
  Kx = 0.1;
  Ky = 0.1;
  Kac = 0.1;
  Km = 0.1;
  Kmi = 0.1;
  Ks = 0.1;
  Kt = 0.1;
  Ki = 0.1;
  Kj = 0.1;
  Ke = 0.1;
  Kf = 0.1;
  Kc = 0.1;
  Kd = 0.1;
  Ka = 0.1;
  Kb = 0.1;
  Kp = 0.1;
  Kq = 0.1;
  Ki1 = 0.1;
  Kj1 = 0.1;
  Kc1 = 0.1;
  Kd1 = 0.1;
  S = 0.1;
  S1 = 0.33;

  // Assignment rules:
  X := Pt - 2*M2 - 3*M3 - 4*M4 - 5*M5 - 5*AC - 5*I1 - 5*I1_ThT - 6*I1a - 6*I1a_ThT - 7*I1b - 7*I1b_ThT - 8*I1c - 8*I1c_ThT - 9*I1d - 9*I1d_ThT - 10*I2 - 10*I2_ThT - 11*I2a - 11*I2a_ThT - 12*I2b - 12*I2b_ThT - 13*I2c - 13*I2c_ThT - 14*I2d - 14*I2d_ThT - 15*I3 - 15*I3_ThT - 15*B1 - 15*B1_ThT - 16*B1a - 16*B1a_ThT - 17*B1b - 17*B1b_ThT - 18*B1c - 18*B1c_ThT - 19*B1d - 19*B1d_ThT - 20*B2 - 20*B2_ThT - 21*B2a - 21*B2a_ThT - 22*B2b - 22*B2b_ThT - 23*B2c - 23*B2c_ThT - 24*B2d - 24*B2d_ThT - 25*B3 - 25*B3_ThT;
  H := SumThT - I1_ThT - I2_ThT - I3_ThT - B1_ThT - B2_ThT - B3_ThT - I1a_ThT - I1b_ThT - I1c_ThT - I1d_ThT - I2a_ThT - I2b_ThT - I2c_ThT - I2d_ThT - B1a_ThT - B1b_ThT - B1c_ThT - B1d_ThT - B2a_ThT - B2b_ThT - B2c_ThT - B2d_ThT;
  BoundedThT := S*(I1_ThT + I1a_ThT + I1b_ThT + I1c_ThT + I1d_ThT + I2_ThT + I2a_ThT + I2b_ThT + I2c_ThT + I2d_ThT + I3_ThT + B1_ThT + B1a_ThT + B1b_ThT + B1c_ThT + B1d_ThT + B2_ThT + B2a_ThT + B2b_ThT + B2c_ThT + B2d_ThT + B3_ThT);
  Helix := S1*(5*I1 + 5*I1_ThT + 6*I1a + 6*I1a_ThT + 7*I1b + 7*I1b_ThT + 8*I1c + 8*I1c_ThT + 9*I1d + 9*I1d_ThT + 10*I2 + 10*I2_ThT + 11*I2a + 11*I2a_ThT + 12*I2b + 12*I2b_ThT + 13*I2c + 13*I2c_ThT + 14*I2d + 14*I2d_ThT + 15*I3 + 15*I3_ThT);

  // Reactions:
  reaction_1: => M2; Kx*X*X*c1;  // modifiers: X
  reaction_2: M2 => ; Ky*M2*c1;
  reaction_3: M2 => M3; Kx*M2*X*c1;  // modifiers: X
  reaction_4: M3 => M2; Ky*M3*c1;
  reaction_5: M3 => M4; Kx*M3*X*c1;  // modifiers: X
  reaction_6: M4 => M3; Ky*M4*c1;
  reaction_7: AC => M5; Kmi*AC*c1;
  reaction_8: M5 => AC; Kac*M5*I3*c1;  // modifiers: I3
  reaction_9: M5 => AC; Km*M5*c1;
  reaction_10: AC => I1; Ks*AC*c1;
  reaction_11: I1 => AC; Kt*I1*c1;
  reaction_12: I1 + I1 => I2; Ki*I1*I1*c1;
  reaction_13: I2 => I1 + I1; Kj*I2*c1;
  reaction_14: I1 => I1a; Ki1*I1*X*c1;  // modifiers: X
  reaction_15: I1a => I1; Kj1*I1a*c1;
  reaction_16: I1a => I1b; Ki1*I1a*X*c1;  // modifiers: X
  reaction_17: I1b => I1a; Kj1*I1b*c1;
  reaction_18: I1b => I1c; Ki1*I1b*X*c1;  // modifiers: X
  reaction_19: I1c => I1b; Kj1*I1c*c1;
  reaction_20: I1c => I1d; Ki1*I1c*X*c1;  // modifiers: X
  reaction_21: I1d => I1c; Kj1*I1d*c1;
  reaction_22: I1 => I1_ThT; Ka*I1*H*c1;  // modifiers: H
  reaction_23: I1_ThT => I1; Kb*I1_ThT*c1;
  reaction_24: I1a => I1a_ThT; Ka*I1a*H*c1;  // modifiers: H
  reaction_25: I1a_ThT => I1a; Kb*I1a_ThT*c1;
  reaction_26: I1b => I1b_ThT; Ka*I1b*H*c1;  // modifiers: H
  reaction_27: I1b_ThT => I1b; Kb*I1b_ThT*c1;
  reaction_28: I1c => I1c_ThT; Ka*I1c*H*c1;  // modifiers: H
  reaction_29: I1c_ThT => I1c; Kb*I1c_ThT*c1;
  reaction_30: I2 + I1 => I3; Ki*I2*I1*c1;
  reaction_31: I3 => I2 + I1; Kj*I3*c1;
  reaction_32: I2 => I2a; Ki1*I2*X*c1;  // modifiers: X
  reaction_33: I2a => I2; Kj1*I2a*c1;
  reaction_34: I2a => I2b; Ki1*I2a*X*c1;  // modifiers: X
  reaction_35: I2b => I2a; Kj1*I2b*c1;
  reaction_36: I2b => I2c; Ki1*I2b*X*c1;  // modifiers: X
  reaction_37: I2c => I2b; Kj1*I2c*c1;
  reaction_38: I2c => I2d; Ki1*I2c*X*c1;  // modifiers: X
  reaction_39: I2d => I2c; Kj1*I2d*c1;
  reaction_40: I2 => I2_ThT; Ka*I2*H*c1;  // modifiers: H
  reaction_41: I2_ThT => I2; Kb*I2_ThT*c1;
  reaction_42: I2a => I2a_ThT; Ka*I2a*H*c1;  // modifiers: H
  reaction_43: I2a_ThT => I2a; Kb*I2a_ThT*c1;
  reaction_44: I2b => I2b_ThT; Ka*I2b*H*c1;  // modifiers: H
  reaction_45: I2b_ThT => I2b; Kb*I2b_ThT*c1;
  reaction_46: I2c => I2c_ThT; Ka*I2c*H*c1;  // modifiers: H
  reaction_47: I2c_ThT => I2c; Kb*I2c_ThT*c1;
  reaction_48: I3 => I3_ThT; Ka*I3*H*c1;  // modifiers: H
  reaction_49: I3_ThT => I3; Kb*I3_ThT*c1;
  reaction_50: I3 => B1; Ke*I3*c1;
  reaction_51: B1 => I3; Kf*B1*c1;
  reaction_52: B1 + I1 => B2; Kc*B1*I1*c1;
  reaction_53: B2 => B1 + I1; Kd*B2*c1;
  reaction_54: B1 => B1a; Kc1*B1*X*c1;  // modifiers: X
  reaction_55: B1a => B1; Kd1*B1a*c1;
  reaction_56: B1a => B1b; Kc1*B1a*X*c1;  // modifiers: X
  reaction_57: B1b => B1a; Kd1*B1b*c1;
  reaction_58: B1b => B1c; Kc1*B1b*X*c1;  // modifiers: X
  reaction_59: B1c => B1b; Kd1*B1c*c1;
  reaction_60: B1c => B1d; Kc1*B1c*X*c1;  // modifiers: X
  reaction_61: B1d => B1c; Kd1*B1d*c1;
  reaction_62: B1 => B1_ThT; Kp*B1*H*c1;  // modifiers: H
  reaction_63: B1_ThT => B1; Kq*B1_ThT*c1;
  reaction_64: B1a => B1a_ThT; Kp*B1a*H*c1;  // modifiers: H
  reaction_65: B1a_ThT => B1a; Kq*B1a_ThT*c1;
  reaction_66: B1b => B1b_ThT; Kp*B1b*H*c1;  // modifiers: H
  reaction_67: B1b_ThT => B1b; Kq*B1b_ThT*c1;
  reaction_68: B1c => B1c_ThT; Kp*B1c*H*c1;  // modifiers: H
  reaction_69: B1c_ThT => B1c; Kq*B1c_ThT*c1;
  reaction_70: B2 + I1 => B3; Kc*B2*I1*c1;
  reaction_71: B3 => B2 + I1; Kd*B3*c1;
  reaction_72: B2 => B2a; Kc1*B2*X*c1;  // modifiers: X
  reaction_73: B2a => B2; Kd1*B2a*c1;
  reaction_74: B2a => B2b; Kc1*B2a*X*c1;  // modifiers: X
  reaction_75: B2b => B2a; Kd1*B2b*c1;
  reaction_76: B2b => B2c; Kc1*B2b*X*c1;  // modifiers: X
  reaction_77: B2c => B2b; Kd1*B2c*c1;
  reaction_78: B2c => B2d; Kc1*B2c*X*c1;  // modifiers: X
  reaction_79: B2d => B2c; Kd1*B2d*c1;
  reaction_80: B2 => B2_ThT; Kp*B2*H*c1;  // modifiers: H
  reaction_81: B2_ThT => B2; Kq*B2_ThT*c1;
  reaction_82: B2a => B2a_ThT; Kp*B2a*H*c1;  // modifiers: H
  reaction_83: B2a_ThT => B2a; Kq*B2a_ThT*c1;
  reaction_84: B2b => B2b_ThT; Kp*B2b*H*c1;  // modifiers: H
  reaction_85: B2b_ThT => B2b; Kq*B2b_ThT*c1;
  reaction_86: B2c => B2c_ThT; Kp*B2c*H*c1;  // modifiers: H
  reaction_87: B2c_ThT => B2c; Kq*B2c_ThT*c1;
  reaction_88: B3 => B3_ThT; Kp*B3*H*c1;  // modifiers: H
  reaction_89: B3_ThT => B3; Kq*B3_ThT*c1;
  reaction_90: M4 => M5; Kx*M4*X*c1;  // modifiers: X
  reaction_91: M5 => M4; Ky*M5*c1;
  reaction_92: I1d => I2; Ki1*I1d*X*c1;  // modifiers: X
  reaction_93: I2 => I1d; Kj1*I2*c1;
  reaction_94: I1d => I1d_ThT; Ka*I1d*H*c1;  // modifiers: H
  reaction_95: I1d_ThT => I1d; Kb*I1d_ThT*c1;
  reaction_96: I2d => I3; Ki1*I2d*X*c1;  // modifiers: X
  reaction_97: I3 => I2d; Kj1*I3*c1;
  reaction_98: I2d => I2d_ThT; Ka*I2d*H*c1;  // modifiers: H
  reaction_99: I2d_ThT => I2d; Kb*I2d_ThT*c1;
  reaction_100: B1d => B2; Kc1*B1d*X*c1;  // modifiers: X
  reaction_101: B2 => B1d; Kd1*B2*c1;
  reaction_102: B1d => B1d_ThT; Kp*B1d*H*c1;  // modifiers: H
  reaction_103: B1d_ThT => B1d; Kq*B1d_ThT*c1;
  reaction_104: B2d => B3; Kc1*B2d*X*c1;  // modifiers: X
  reaction_105: B3 => B2d; Kd1*B3*c1;
  reaction_106: B2d => B2d_ThT; Kp*B2d*H*c1;  // modifiers: H
  reaction_107: B2d_ThT => B2d; Kq*B2d_ThT*c1;
end
