// SBML level 2 version 4

model Model2D()
  // SBML model exported from PottersWheel on 2021-06-03 09:01:35.
  // % PottersWheel model definition file
  // function m = Model2D()
  // m = pwGetEmptyModel();
  // %% Meta information
  // m.name = 'Model2D';
  // m.description = 'Protein aggregation';
  // m.authors = {};
  // m.dates = {'2021-06-01'};
  // m.modelFormat = 3;
  // %% Default sampling time points
  // m.t = 0:10:200;
  // %% X - Dynamic variables
  // % m = pwAddX(m, *ID, *startValue, fitSetting, minValue, maxValue, unit, compartment, name, description, typeOfStartValue, designerProps, classname)
  // m = pwAddX(m, 'M2' , 0.1, 'fix', 0, [], [], 'C1', [] , [] , [] , [-415 -375 0 100 40 0.870588235294118 0.490196078431373 0 0 0 0 1] , 'protein.generic');
  // m = pwAddX(m, 'M3' , 0, 'fix', 0, [], [], 'C1', [] , [] , [] , [-345 -865 0 100 40 0.870588235294118 0.490196078431373 0 0 0 0 1] , 'protein.generic');
  // m = pwAddX(m, 'AC' , 0, 'fix', 0, [], [], 'C1', [] , [] , [] , [-145 -1075 0 100 40 0.870588235294118 0.490196078431373 0 0 0 0 1] , 'protein.generic');
  // m = pwAddX(m, 'I1' , 0, 'fix', 0, [], [], 'C1', [] , [] , [] , [165 -1095 0 100 40 0 0.498039215686275 0 0 0 0 1] , 'protein.generic');
  // m = pwAddX(m, 'I2' , 0, 'fix', 0, [], [], 'C1', [] , [] , [] , [585 -1035 0 100 40 0 0.498039215686275 0 0 0 0 1] , 'protein.generic');
  // m = pwAddX(m, 'I3' , 0, 'fix', 0, [], [], 'C1', [] , [] , [] , [805 -695 0 100 40 0 0.498039215686275 0 0 0 0 1] , 'protein.generic');
  // m = pwAddX(m, 'I4' , 0, 'fix', 0, [], [], 'C1', [] , [] , [] , [1015 -425 0 100 40 0 0.498039215686275 0 0 0 0 1] , 'protein.generic');
  // m = pwAddX(m, 'B1' , 0, 'fix', 0, [], [], 'C1', [] , [] , [] , [1085 -175 0 100 40 0.301960784313725 0.745098039215686 0.933333333333333 0 0 0 1] , 'protein.generic');
  // m = pwAddX(m, 'B2' , 0, 'fix', 0, [], [], 'C1', [] , [] , [] , [1155 225 0 100 40 0.301960784313725 0.745098039215686 0.933333333333333 0 0 0 1] , 'protein.generic');
  // m = pwAddX(m, 'B3' , 0, 'fix', 0, [], [], 'C1', [] , [] , [] , [1035 805 0 100 40 0.301960784313725 0.745098039215686 0.933333333333333 0 0 0 1] , 'protein.generic');
  // m = pwAddX(m, 'I1_ThT' , 0, 'fix', 0, [], [], 'C1', [] , [] , [] , [675 905 0 100 40 1 0 1 0 0 0 1] , 'protein.generic');
  // m = pwAddX(m, 'I2_ThT' , 0, 'fix', 0, [], [], 'C1', [] , [] , [] , [505 945 0 100 40 1 0 1 0 0 0 1] , 'protein.generic');
  // m = pwAddX(m, 'I3_ThT' , 0, 'fix', 0, [], [], 'C1', [] , [] , [] , [325 915 0 100 40 1 0 1 0 0 0 1] , 'protein.generic');
  // m = pwAddX(m, 'I4_ThT' , 0, 'fix', 0, [], [], 'C1', [] , [] , [] , [125 875 0 100 40 1 0 1 0 0 0 1] , 'protein.generic');
  // m = pwAddX(m, 'B1_ThT' , 0, 'fix', 0, [], [], 'C1', [] , [] , [] , [-35 805 0 100 40 1 0 1 0 0 0 1] , 'protein.generic');
  // m = pwAddX(m, 'B2_ThT' , 0, 'fix', 0, [], [], 'C1', [] , [] , [] , [-315 635 0 100 40 1 0 1 0 0 0 1] , 'protein.generic');
  // m = pwAddX(m, 'B3_ThT' , 0, 'fix', 0, [], [], 'C1', [] , [] , [] , [1085 1045 0 100 40 1 0 1 0 0 0 1] , 'protein.generic');
  // m = pwAddX(m, 'Pt' , 300, 'fix', [], [], [], 'C1', [] , [] , [] , [5 95 0 100 40 1 0 0 0 0 0 1] , 'protein.generic');
  // m = pwAddX(m, 'SumThT' , 1000, 'fix', [], [], [], 'C1', [] , [] , [] , [-55 -75 0 100 40 1 0 0 0 0 0 1] , 'protein.generic');
  // m = pwAddX(m, 'I1a_ThT', 0, 'fix', 0, [], [], 'c1', [] , [] , [] , [165 -1615 0 100 40 1 0 1 0 0 0 1] , 'protein.generic');
  // m = pwAddX(m, 'I1b_ThT', 0, 'fix', 0, [], [], 'c1', [] , [] , [] , [405 -1655 0 100 40 1 0 1 0 0 0 1] , 'protein.generic');
  // m = pwAddX(m, 'I2a' , 0, 'fix', 0, [], [], 'c1', [] , [] , [] , [825 -1275 0 100 40 0 0.498039215686275 0 0 0 0 1] , 'protein.generic');
  // m = pwAddX(m, 'I2b' , 0, 'fix', 0, [], [], 'c1', [] , [] , [] , [945 -1075 0 100 40 0 0.498039215686275 0 0 0 0 1] , 'protein.generic');
  // m = pwAddX(m, 'I2a_ThT', 0, 'fix', 0, [], [], 'c1', [] , [] , [] , [1045 -1385 0 100 40 1 0 1 0 0 0 1] , 'protein.generic');
  // m = pwAddX(m, 'I2b_ThT', 0, 'fix', 0, [], [], 'c1', [] , [] , [] , [1175 -1265 0 100 40 1 0 1 0 0 0 1] , 'protein.generic');
  // m = pwAddX(m, 'I3a' , 0, 'fix', 0, [], [], 'c1', [] , [] , [] , [1305 -855 0 100 40 0 0.498039215686275 0 0 0 0 1] , 'protein.generic');
  // m = pwAddX(m, 'I3b' , 0, 'fix', 0, [], [], 'c1', [] , [] , [] , [1455 -695 0 100 40 0 0.498039215686275 0 0 0 0 1] , 'protein.generic');
  // m = pwAddX(m, 'I3a_ThT', 0, 'fix', 0, [], [], 'c1', [] , [] , [] , [1575 -995 0 100 40 1 0 1 0 0 0 1] , 'protein.generic');
  // m = pwAddX(m, 'I3b_ThT', 0, 'fix', 0, [], [], 'c1', [] , [] , [] , [1725 -875 0 100 40 1 0 1 0 0 0 1] , 'protein.generic');
  // m = pwAddX(m, 'B1a' , 0, 'fix', 0, [], [], 'c1', [] , [] , [] , [1765 -415 0 100 40 0.301960784313725 0.745098039215686 0.933333333333333 0 0 0 1] , 'protein.generic');
  // m = pwAddX(m, 'B1b' , 0, 'fix', 0, [], [], 'c1', [] , [] , [] , [1785 -165 0 100 40 0.301960784313725 0.745098039215686 0.933333333333333 0 0 0 1] , 'protein.generic');
  // m = pwAddX(m, 'B1a_ThT', 0, 'fix', 0, [], [], 'c1', [] , [] , [] , [1955 -545 0 100 40 1 0 1 0 0 0 1] , 'protein.generic');
  // m = pwAddX(m, 'B1b_ThT', 0, 'fix', 0, [], [], 'c1', [] , [] , [] , [2095 -245 0 100 40 1 0 1 0 0 0 1] , 'protein.generic');
  // m = pwAddX(m, 'B2a' , 0, 'fix', 0, [], [], 'c1', [] , [] , [] , [1515 265 0 100 40 0.301960784313725 0.745098039215686 0.933333333333333 0 0 0 1] , 'protein.generic');
  // m = pwAddX(m, 'B2b' , 0, 'fix', 0, [], [], 'c1', [] , [] , [] , [1585 485 0 100 40 0.301960784313725 0.745098039215686 0.933333333333333 0 0 0 1] , 'protein.generic');
  // m = pwAddX(m, 'B2a_ThT', 0, 'fix', 0, [], [], 'c1', [] , [] , [] , [1855 385 0 100 40 1 0 1 0 0 0 1] , 'protein.generic');
  // m = pwAddX(m, 'B2b_ThT', 0, 'fix', 0, [], [], 'c1', [] , [] , [] , [1835 635 0 100 40 1 0 1 0 0 0 1] , 'protein.generic');
  // m = pwAddX(m, 'I1a' , 0, 'fix', 0, [], [], 'c1', [] , [] , [] , [165 -1375 0 100 40 0 0.498039215686275 0 0 0 0 1] , 'protein.generic');
  // m = pwAddX(m, 'I1b' , 0, 'fix', 0, [], [], 'c1', [] , [] , [] , [385 -1455 0 100 40 0 0.498039215686275 0 0 0 0 1] , 'protein.generic');
  // %% K - Dynamic parameters
  // % m = pwAddK(m, *ID, *value, fitSetting, minValue, maxValue, unit, name, description)
  // m = pwAddK(m, 'Kx' , 0.1, 'global', 0.0001, 10000);
  // m = pwAddK(m, 'Ky' , 0.1, 'global', 0.0001, 10000);
  // m = pwAddK(m, 'Kac', 0.1, 'global', 0.0001, 10000);
  // m = pwAddK(m, 'Km' , 0.1, 'global', 0.0001, 10000);
  // m = pwAddK(m, 'Kmi', 0.1, 'global', 0.0001, 10000);
  // m = pwAddK(m, 'Ks' , 0.1, 'global', 0.0001, 10000);
  // m = pwAddK(m, 'Kt' , 0.1, 'global', 0.0001, 10000);
  // m = pwAddK(m, 'Ki' , 0.1, 'global', 0.0001, 10000);
  // m = pwAddK(m, 'Kj' , 0.1, 'global', 0.0001, 10000);
  // m = pwAddK(m, 'Ke' , 0.1, 'global', 0.0001, 10000);
  // m = pwAddK(m, 'Kf' , 0.1, 'global', 0.0001, 10000);
  // m = pwAddK(m, 'Kc' , 0.1, 'global', 0.0001, 10000);
  // m = pwAddK(m, 'Kd' , 0.1, 'global', 0.0001, 10000);
  // m = pwAddK(m, 'Ka' , 0.1, 'global', 0.0001, 10000);
  // m = pwAddK(m, 'Kb' , 0.1, 'global', 0.0001, 10000);
  // m = pwAddK(m, 'Kp' , 0.1, 'global', 0.0001, 10000);
  // m = pwAddK(m, 'Kq' , 0.1, 'global', 0.0001, 10000);
  // m = pwAddK(m, 'Ki1', 0.1, 'global', 0.0001, 10000);
  // m = pwAddK(m, 'Kj1', 0.1, 'global', 0.0001, 10000);
  // m = pwAddK(m, 'Kc1', 0.1, 'global', 0.0001, 10000);
  // m = pwAddK(m, 'Kd1', 0.1, 'global', 0.0001, 10000);
  // %% R - Reactions
  // % m = pwAddR(m, *ID, *reactants, *products, *modifiers, *type, *options, *rateSignature, *parameters, description, name, fast, compartments, parameterTrunks, designerPropsR, stoichiometry, reversible)
  // m = pwAddR(m, 'R01' , { }, {'M2' }, {'X' }, 'C' , [] , 'k1 * m1 * m1', {'Kx'}, [], [], [], {}, {}, {[], [], [1 0 0 0 1.8 1 1 1], [1 0.9 0.1 0.1 1.8 1 4 1]});
  // m = pwAddR(m, 'R02' , {'M2' }, { }, { }, 'C' , [] , 'k1 * r1' , {'Ky'}, [], [], [], {}, {}, {[], [1 0.45 0.45 0.45 1.8 1 1 1], [], []});
  // m = pwAddR(m, 'R03' , {'M2' }, {'M3' }, {'X' }, 'C' , [] , 'k1 * r1 * m1', {'Kx'}, [], [], [], {}, {}, {[], [1 0.45 0.45 0.45 1.8 1 1 1], [1 0 0 0 1.8 1 1 1], [1 0.9 0.1 0.1 1.8 1 4 1]});
  // m = pwAddR(m, 'R04' , {'M3' }, {'M2' }, { }, 'C' , [] , 'k1 * r1' , {'Ky'}, [], [], [], {}, {}, {[], [1 0.45 0.45 0.45 1.8 1 1 1], [1 0 0 0 1.8 1 1 1], []});
  // m = pwAddR(m, 'R05' , {'M3' }, {'AC' }, { }, 'A' , [] , [] , {'Km'}, [], [], [], {}, {}, {[], [1 0.45 0.45 0.45 1.8 1 1 1], [1 0 0 0 1.8 1 1 1], [1 0.9 0.1 0.1 1.8 1 4 1]});
  // m = pwAddR(m, 'R09' , {'M3' }, {'AC' }, {'I4'}, 'A' , [] , [] , {'Kac'}, [], [], [], {}, {}, {[], [1 0.45 0.45 0.45 1.8 1 1 1], [1 0 0 0 1.8 1 1 1], [1 0.9 0.1 0.1 1.8 1 4 1]});
  // m = pwAddR(m, 'R07' , {'AC' }, {'M3' }, { }, 'A' , [] , [] , {'Kmi'}, [], [], [], {}, {}, {[], [1 0.45 0.45 0.45 1.8 1 1 1], [1 0 0 0 1.8 1 1 1], []});
  // m = pwAddR(m, 'R10' , {'AC' }, {'I1' }, { }, 'A' , [] , [] , {'Ks'}, [], [], [], {}, {}, {[], [1 0.45 0.45 0.45 1.8 1 1 1], [1 0 0 0 1.8 1 1 1], []});
  // m = pwAddR(m, 'R11' , {'I1' }, {'AC' }, { }, 'A' , [] , [] , {'Kt'}, [], [], [], {}, {}, {[], [1 0.45 0.45 0.45 1.8 1 1 1], [1 0 0 0 1.8 1 1 1], []});
  // m = pwAddR(m, 'R12' , {'I1','I1'}, {'I2' }, { }, 'A' , [] , [] , {'Ki'}, [], [], [], {}, {}, {[], [1 0.45 0.45 0.45 1.8 1 1 1;1 0.45 0.45 0.45 1.8 1 1 1], [1 0 0 0 1.8 1 1 1], []});
  // m = pwAddR(m, 'R13' , {'I2' }, {'I1','I1'}, { }, 'A' , [] , [] , {'Kj'}, [], [], [], {}, {}, {[], [1 0.45 0.45 0.45 1.8 1 1 1], [1 0 0 0 1.8 1 1 1;1 0 0 0 1.8 1 1 1], []});
  // m = pwAddR(m, 'R14' , {'I1' }, {'I1a' }, {'X' }, 'C' , [] , 'k1*r1*m1' , {'Ki1'}, [], [], [], {}, {}, {[], [1 0.45 0.45 0.45 1.8 1 1 1], [1 0 0 0 1.8 1 1 1], [1 0.9 0.1 0.1 1.8 1 4 1]});
  // m = pwAddR(m, 'R15' , {'I1a' }, {'I1' }, { }, 'C' , [] , 'k1*r1' , {'Kj1'}, [], [], [], {}, {}, {[], [1 0.45 0.45 0.45 1.8 1 1 1], [1 0 0 0 1.8 1 1 1], []});
  // m = pwAddR(m, 'R16' , {'I1a' }, {'I1b' }, {'X' }, 'C' , [] , 'k1*r1*m1' , {'Ki1'}, [], [], [], {}, {}, {[], [1 0.45 0.45 0.45 1.8 1 1 1], [1 0 0 0 1.8 1 1 1], [1 0.9 0.1 0.1 1.8 1 4 1]});
  // m = pwAddR(m, 'R17' , {'I1b' }, {'I1a' }, { }, 'C' , [] , 'k1*r1' , {'Kj1'}, [], [], [], {}, {}, {[], [1 0.45 0.45 0.45 1.8 1 1 1], [1 0 0 0 1.8 1 1 1], []});
  // m = pwAddR(m, 'R18' , {'I1b' }, {'I2' }, {'X' }, 'C' , [] , 'k1*r1*m1' , {'Ki1'}, [], [], [], {}, {}, {[], [1 0.45 0.45 0.45 1.8 1 1 1], [1 0 0 0 1.8 1 1 1], [1 0.9 0.1 0.1 1.8 1 4 1]});
  // m = pwAddR(m, 'R19' , {'I2' }, {'I1b' }, { }, 'C' , [] , 'k1*r1' , {'Kj1'}, [], [], [], {}, {}, {[], [1 0.45 0.45 0.45 1.8 1 1 1], [1 0 0 0 1.8 1 1 1], []});
  // m = pwAddR(m, 'R22' , {'I1' }, {'I1_ThT' }, {'H' }, 'C' , [] , 'k1*r1*m1' , {'Ka'}, [], [], [], {}, {}, {[], [1 0.45 0.45 0.45 1.8 1 1 1], [1 0 0 0 1.8 1 1 1], [1 0.9 0.1 0.1 1.8 1 4 1]});
  // m = pwAddR(m, 'R23' , {'I1_ThT' }, {'I1' }, { }, 'C' , [] , 'k1*r1' , {'Kb'}, [], [], [], {}, {}, {[], [1 0.45 0.45 0.45 1.8 1 1 1], [1 0 0 0 1.8 1 1 1], []});
  // m = pwAddR(m, 'R24' , {'I1a' }, {'I1a_ThT'}, {'H' }, 'C' , [] , 'k1*r1*m1' , {'Ka'}, [], [], [], {}, {}, {[], [1 0.45 0.45 0.45 1.8 1 1 1], [1 0 0 0 1.8 1 1 1], [1 0.9 0.1 0.1 1.8 1 4 1]});
  // m = pwAddR(m, 'R25' , {'I1a_ThT'}, {'I1a' }, { }, 'C' , [] , 'k1*r1' , {'Kb'}, [], [], [], {}, {}, {[], [1 0.45 0.45 0.45 1.8 1 1 1], [1 0 0 0 1.8 1 1 1], []});
  // m = pwAddR(m, 'R26' , {'I1b' }, {'I1b_ThT'}, {'H' }, 'C' , [] , 'k1*r1*m1' , {'Ka'}, [], [], [], {}, {}, {[], [1 0.45 0.45 0.45 1.8 1 1 1], [1 0 0 0 1.8 1 1 1], [1 0.9 0.1 0.1 1.8 1 4 1]});
  // m = pwAddR(m, 'R27' , {'I1b_ThT'}, {'I1b' }, { }, 'C' , [] , 'k1*r1' , {'Kb'}, [], [], [], {}, {}, {[], [1 0.45 0.45 0.45 1.8 1 1 1], [1 0 0 0 1.8 1 1 1], []});
  // m = pwAddR(m, 'R30' , {'I2','I1'}, {'I3' }, { }, 'A' , [] , [] , {'Ki'}, [], [], [], {}, {}, {[], [1 0.45 0.45 0.45 1.8 1 1 1;1 0.45 0.45 0.45 1.8 1 1 1], [1 0 0 0 1.8 1 1 1], []});
  // m = pwAddR(m, 'R31' , {'I3' }, {'I2','I1'}, { }, 'A' , [] , [] , {'Kj'}, [], [], [], {}, {}, {[], [1 0.45 0.45 0.45 1.8 1 1 1], [1 0 0 0 1.8 1 1 1;1 0 0 0 1.8 1 1 1], []});
  // m = pwAddR(m, 'R32' , {'I2' }, {'I2a' }, {'X' }, 'C' , [] , 'k1*r1*m1' , {'Ki1'}, [], [], [], {}, {}, {[], [1 0.45 0.45 0.45 1.8 1 1 1], [1 0 0 0 1.8 1 1 1], [1 0.9 0.1 0.1 1.8 1 4 1]});
  // m = pwAddR(m, 'R33' , {'I2a' }, {'I2' }, { }, 'C' , [] , 'k1*r1' , {'Kj1'}, [], [], [], {}, {}, {[], [1 0.45 0.45 0.45 1.8 1 1 1], [1 0 0 0 1.8 1 1 1], []});
  // m = pwAddR(m, 'R34' , {'I2a' }, {'I2b' }, {'X' }, 'C' , [] , 'k1*r1*m1' , {'Ki1'}, [], [], [], {}, {}, {[], [1 0.45 0.45 0.45 1.8 1 1 1], [1 0 0 0 1.8 1 1 1], [1 0.9 0.1 0.1 1.8 1 4 1]});
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
  // Compartments:
  compartment c1 = 1;

  // Species:
  species M2 in C1 = 0.1;
  species M3 in C1 = 0;
  species AC in C1 = 0;
  species I1 in C1 = 0;
  species I2 in C1 = 0;
  species I3 in C1 = 0;
  species I4 in C1 = 0;
  species B1 in C1 = 0;
  species B2 in C1 = 0;
  species B3 in C1 = 0;
  species I1_ThT in C1 = 0;
  species I2_ThT in C1 = 0;
  species I3_ThT in C1 = 0;
  species I4_ThT in C1 = 0;
  species B1_ThT in C1 = 0;
  species B2_ThT in C1 = 0;
  species B3_ThT in C1 = 0;
  species Pt in C1 = 300;
  species SumThT in C1 = 1000;
  species I1a_ThT in c1 = 0;
  species I1b_ThT in c1 = 0;
  species I2a in c1 = 0;
  species I2b in c1 = 0;
  species I2a_ThT in c1 = 0;
  species I2b_ThT in c1 = 0;
  species I3a in c1 = 0;
  species I3b in c1 = 0;
  species I3a_ThT in c1 = 0;
  species I3b_ThT in c1 = 0;
  species B1a in c1 = 0;
  species B1b in c1 = 0;
  species B1a_ThT in c1 = 0;
  species B1b_ThT in c1 = 0;
  species B2a in c1 = 0;
  species B2b in c1 = 0;
  species B2a_ThT in c1 = 0;
  species B2b_ThT in c1 = 0;
  species I1a in c1 = 0;
  species I1b in c1 = 0;
  species BoundedThT in c1;
  species Helix in c1;

  // Parameters:
  Kx = 0.1;
  Ky = 0.1;
  Kac = 0.1;
  Km = 0.1;
  Kmi = 0.1;
  Ks = 0.1;
  Kt = 0.1;
  Ki = 0.1;
  Kj = 0.1;
  Ke = 0.1;
  Kf = 0.1;
  Kc = 0.1;
  Kd = 0.1;
  Ka = 0.1;
  Kb = 0.1;
  Kp = 0.1;
  Kq = 0.1;
  Ki1 = 0.1;
  Kj1 = 0.1;
  Kc1 = 0.1;
  Kd1 = 0.1;
  S = 0.1;
  S1 = 0.33;

  // Assignment rules:
  X := Pt - 2*M2 - 3*M3 - 3*AC - 3*I1 - 3*I1_ThT - 4*I1a - 4*I1a_ThT - 5*I1b - 5*I1b_ThT - 6*I2 - 6*I2_ThT - 7*I2a - 7*I2a_ThT - 8*I2b - 8*I2b_ThT - 9*I3 - 9*I3_ThT - 10*I3a - 10*I3a_ThT - 11*I3b - 11*I3b_ThT - 12*I4 - 12*I4_ThT - 12*B1 - 12*B1_ThT - 13*B1a - 13*B1a_ThT - 14*B1b - 14*B1b_ThT - 15*B2 - 15*B2_ThT - 16*B2a - 16*B2a_ThT - 17*B2b - 17*B2b_ThT - 18*B3 - 18*B3_ThT;
  H := SumThT - I1_ThT - I2_ThT - I3_ThT - I4_ThT - B1_ThT - B2_ThT - B3_ThT - I1a_ThT - I1b_ThT - I2a_ThT - I2b_ThT - I3a_ThT - I3b_ThT - B1a_ThT - B1b_ThT - B2a_ThT - B2b_ThT;
  BoundedThT := S*(I1_ThT + I1a_ThT + I1b_ThT + I2_ThT + I2a_ThT + I2b_ThT + I3_ThT + I3a_ThT + I3b_ThT + I4_ThT + B1_ThT + B1a_ThT + B1b_ThT + B2_ThT + B2a_ThT + B2b_ThT + B3_ThT);
  Helix := S1*(3*I1 + 3*I1_ThT + 4*I1a + 4*I1a_ThT + 5*I1b + 5*I1b_ThT + 6*I2 + 6*I2_ThT + 7*I2a + 7*I2a_ThT + 8*I2b + 8*I2b_ThT + 9*I3 + 9*I3_ThT + 10*I3a + 10*I3a_ThT + 11*I3b + 11*I3b_ThT + 12*I4 + 12*I4_ThT);

  // Reactions:
  reaction_1: => M2; Kx*X*X*c1;  // modifiers: X
  reaction_2: M2 => ; Ky*M2*c1;
  reaction_3: M2 => M3; Kx*M2*X*c1;  // modifiers: X
  reaction_4: M3 => M2; Ky*M3*c1;
  reaction_5: M3 => AC; Km*M3*c1;
  reaction_6: M3 => AC; Kac*M3*I4*c1;  // modifiers: I4
  reaction_7: AC => M3; Kmi*AC*c1;
  reaction_8: AC => I1; Ks*AC*c1;
  reaction_9: I1 => AC; Kt*I1*c1;
  reaction_10: I1 + I1 => I2; Ki*I1*I1*c1;
  reaction_11: I2 => I1 + I1; Kj*I2*c1;
  reaction_12: I1 => I1a; Ki1*I1*X*c1;  // modifiers: X
  reaction_13: I1a => I1; Kj1*I1a*c1;
  reaction_14: I1a => I1b; Ki1*I1a*X*c1;  // modifiers: X
  reaction_15: I1b => I1a; Kj1*I1b*c1;
  reaction_16: I1b => I2; Ki1*I1b*X*c1;  // modifiers: X
  reaction_17: I2 => I1b; Kj1*I2*c1;
  reaction_18: I1 => I1_ThT; Ka*I1*H*c1;  // modifiers: H
  reaction_19: I1_ThT => I1; Kb*I1_ThT*c1;
  reaction_20: I1a => I1a_ThT; Ka*I1a*H*c1;  // modifiers: H
  reaction_21: I1a_ThT => I1a; Kb*I1a_ThT*c1;
  reaction_22: I1b => I1b_ThT; Ka*I1b*H*c1;  // modifiers: H
  reaction_23: I1b_ThT => I1b; Kb*I1b_ThT*c1;
  reaction_24: I2 + I1 => I3; Ki*I2*I1*c1;
  reaction_25: I3 => I2 + I1; Kj*I3*c1;
  reaction_26: I2 => I2a; Ki1*I2*X*c1;  // modifiers: X
  reaction_27: I2a => I2; Kj1*I2a*c1;
  reaction_28: I2a => I2b; Ki1*I2a*X*c1;  // modifiers: X
  reaction_29: I2b => I2a; Kj1*I2b*c1;
  reaction_30: I2b => I3; Ki1*I2b*X*c1;  // modifiers: X
  reaction_31: I3 => I2b; Kj1*I3*c1;
  reaction_32: I2 => I2_ThT; Ka*I2*H*c1;  // modifiers: H
  reaction_33: I2_ThT => I2; Kb*I2_ThT*c1;
  reaction_34: I2a => I2a_ThT; Ka*I2a*H*c1;  // modifiers: H
  reaction_35: I2a_ThT => I2a; Kb*I2a_ThT*c1;
  reaction_36: I2b => I2b_ThT; Ka*I2b*H*c1;  // modifiers: H
  reaction_37: I2b_ThT => I2b; Kb*I2b_ThT*c1;
  reaction_38: I3 + I1 => I4; Ki*I3*I1*c1;
  reaction_39: I4 => I3 + I1; Kj*I4*c1;
  reaction_40: I3 => I3a; Ki1*I3*X*c1;  // modifiers: X
  reaction_41: I3a => I3; Kj1*I3a*c1;
  reaction_42: I3a => I3b; Ki1*I3a*X*c1;  // modifiers: X
  reaction_43: I3b => I3a; Kj1*I3b*c1;
  reaction_44: I3b => I4; Ki1*I3b*X*c1;  // modifiers: X
  reaction_45: I4 => I3b; Kj1*I4*c1;
  reaction_46: I3 => I3_ThT; Ka*I3*H*c1;  // modifiers: H
  reaction_47: I3_ThT => I3; Kb*I3_ThT*c1;
  reaction_48: I3a => I3a_ThT; Ka*I3a*H*c1;  // modifiers: H
  reaction_49: I3a_ThT => I3a; Kb*I3a_ThT*c1;
  reaction_50: I3b => I3b_ThT; Ka*I3b*H*c1;  // modifiers: H
  reaction_51: I3b_ThT => I3b; Kb*I3b_ThT*c1;
  reaction_52: I4 => B1; Ke*I4*c1;
  reaction_53: B1 => I4; Kf*B1*c1;
  reaction_54: I4 => I4_ThT; Ka*I4*H*c1;  // modifiers: H
  reaction_55: I4_ThT => I4; Kb*I4_ThT*c1;
  reaction_56: B1 + I1 => B2; Kc*B1*I1*c1;
  reaction_57: B2 => B1 + I1; Kd*B2*c1;
  reaction_58: B1 => B1a; Kc1*B1*X*c1;  // modifiers: X
  reaction_59: B1a => B1; Kd1*B1a*c1;
  reaction_60: B1a => B1b; Kc1*B1a*X*c1;  // modifiers: X
  reaction_61: B1b => B1a; Kd1*B1b*c1;
  reaction_62: B1b => B2; Kc1*B1b*X*c1;  // modifiers: X
  reaction_63: B2 => B1b; Kd1*B2*c1;
  reaction_64: B1 => B1_ThT; Kp*B1*H*c1;  // modifiers: H
  reaction_65: B1_ThT => B1; Kq*B1_ThT*c1;
  reaction_66: B1a => B1a_ThT; Kp*B1a*H*c1;  // modifiers: H
  reaction_67: B1a_ThT => B1a; Kq*B1a_ThT*c1;
  reaction_68: B1b => B1b_ThT; Kp*B1b*H*c1;  // modifiers: H
  reaction_69: B1b_ThT => B1b; Kq*B1b_ThT*c1;
  reaction_70: B2 + I1 => B3; Kc*B2*I1*c1;
  reaction_71: B3 => B2 + I1; Kd*B3*c1;
  reaction_72: B2 => B2a; Kc1*B2*X*c1;  // modifiers: X
  reaction_73: B2a => B2; Kd1*B2a*c1;
  reaction_74: B2a => B2b; Kc1*B2a*X*c1;  // modifiers: X
  reaction_75: B2b => B2a; Kd1*B2b*c1;
  reaction_76: B2b => B3; Kc1*B2b*X*c1;  // modifiers: X
  reaction_77: B3 => B2b; Kd1*B3*c1;
  reaction_78: B2 => B2_ThT; Kp*B2*H*c1;  // modifiers: H
  reaction_79: B2_ThT => B2; Kq*B2_ThT*c1;
  reaction_80: B2a => B2a_ThT; Kp*B2a*H*c1;  // modifiers: H
  reaction_81: B2a_ThT => B2a; Kq*B2a_ThT*c1;
  reaction_82: B2b => B2b_ThT; Kp*B2b*H*c1;  // modifiers: H
  reaction_83: B2b_ThT => B2b; Kq*B2b_ThT*c1;
  reaction_84: B3 => B3_ThT; Kp*B3*H*c1;  // modifiers: H
  reaction_85: B3_ThT => B3; Kq*B3_ThT*c1;
end
